*HEADING

*NODE
       3,        102.1085983627617,      -5.9610446201456035,        43.73916364382536
       4,       102.13395329188128,      -5.9690536298372106,        43.57640940162795
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**
** SOLID ELEMENTS
**
*ELEMENT, TYPE=C3D8R, ELSET=Solid
   50596,      213,     1394,      114,      523,    41297,    41299,    37804,    37992
   50597,     1394,      213,      524,       10,    41299,    41297,    37821,    37778
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*ELEMENT, TYPE=C3D6, ELSET=Solid
   45232,     1438,      735,      741,    41302,    37965,    37966
   45469,      735,     1438,      751,    37965,    41302,    37967
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**
**
**
**
**
**
**
** SECTION DATA
**
*SOLID SECTION, ELSET=Solid, MATERIAL=GH4169
**
** MATERIALS
**
**
**GH4169
**
*MATERIAL, NAME=GH4169
*DENSITY
                 8.24E-9,
*EXPANSION, TYPE=ISO, ZERO=20.
                 1.48E-5,
*ELASTIC, TYPE=ISOTROPIC
                 168000.,                     0.32
*CONDUCTIVITY, TYPE=ISO
                    21.2,
**
**
**
**
** SURFACE DEFINITIONS
**
*SURFACE, NAME=Pressure, TYPE=ELEMENT
   51817, S3
   51835, S3
   51841, S3
   51847, S3
   51875, S3
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   52426, S6
**
** SETS
**
*NSET, NSET=Tie1-S
       3,        4,       10,      105,      114,      213
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*NSET, NSET=Tie2-S
      93,       94,      103,      185,      193,      726
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*NSET, NSET=Tie3-S
   41215,    41216,    41217,    41218,    41219,    41220
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*NSET, NSET=Tie4-S
   41717,    41718,    41726,    41731,    41742,    41749
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*NSET, NSET=Temperature
       3,        4,       10,       93,       94,      103
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